# OpenSim document version 20302
MarkerSet:
  Marker handm: hand (-0.004279947 0.002645642 0.01197044) fixed=true scale_factors=(1 1 1)
  Marker elbow: ulna (0.003278809 -0.0002424449 0.008056862) scale_factors=(1 1 1)
  Marker shoulderm: scapula (0.008218456 0.002108732 0.01200613) scale_factors=(1 1 1)
  Marker wristm: radius (-0.002826996 0.001558985 0.01126033) scale_factors=(1 1 1)
