# OpenSim document version 40600
Model subject01:
  PathPoint StartPoint: humerus (0.01316672 0 0.01152088)
  PathPoint EndPoint: clavicle (0 0 0)
  Ground
  BodySet:
    Body scapula: mass=0.00133747 [kg] mass_center=(-0.003242304 0.001161963 -0.001364401)
        inertia=(6.038203e-6 1.207641e-6 6.038203e-6 0 0 0) meshes=GeomJan01242023\Bones_Scapula.stl
    Body humerus: mass=0.0005612913 mass_center=(0.01102713 0.0008229199 0.01828528)
        inertia=(6.038203e-6 1.207641e-6 6.038203e-6 0 0 0) meshes=GeomJan01242023\Bone_Segmentation_Humerus.stl
      WrapCylinder shoulder_wrap: xyz_body_rotation=(1.04793 -1.490116e-8 0)
          translation=(0.01390196 0.002414905 0.02004211) quadrant=all radius=0.0009875039 length=0.004114599
      WrapCylinder elbow: xyz_body_rotation=(1.04793 -1.490116e-8 0) translation=(0.005562918 -0.000235138 0.0146802)
          quadrant=all radius=0.0009875039 length=0.00246876
    Body ulna: mass=0.002331326 mass_center=(-0.00044533 0.001484433 0.01469588)
        inertia=(3.603891e-6 7.207781e-7 3.603891e-6 0 0 0) meshes=GeomJan01242023\Bone_Segments_Ulna.stl
    Body hand: mass=0.0002374748 mass_center=(-0.007125274 0.002820421 0.01781318)
        inertia=(3.603891e-6 7.207781e-7 3.603891e-6 0 0 0) meshes=GeomJan01242023\Bone_Segments_Hand.stl
    Body radius: mass=0.0001736903 mass_center=(-0.0004453296 0.002078205 0.01528965)
        inertia=(3.603891e-6 7.207781e-7 3.603891e-6 0 0 0) meshes=GeomJan01242023\Bone_Segments_Radius.stl
    Body clavicle: mass=3.53e-5 mass_center=(0 0 0) inertia=(5e-7 1e-7 5e-7 0 0 0)
        meshes=GeomJan01242023\Bone_Segmentation_Segment_8.stl
  JointSet:
    WeldJoint ground_scapula: socket_parent_frame=ground_offset socket_child_frame=scapula_offset
      PhysicalOffsetFrame ground_offset: socket_parent=/ground translation=(0 0 0) [meters]
          orientation=(0 1.745329 0.3490658) [radians]
      PhysicalOffsetFrame scapula_offset: socket_parent=/bodyset/scapula translation=(0 0 0)
    CustomJoint shoulder: socket_parent_frame=scapula_offset socket_child_frame=humerus_offset
      Coordinate elv_angle: default_value=1.569059 range=(-0.5 2.75) clamped=true
      Coordinate extension_angle: default_value=0 range=(-1.458063 2.2) clamped=true
      Coordinate rotation_angle: default_value=0 range=(-1 0.5) clamped=true
      PhysicalOffsetFrame scapula_offset: socket_parent=/bodyset/scapula
          translation=(0.01382653 0.002284423 0.02035876)
      PhysicalOffsetFrame humerus_offset: socket_parent=/bodyset/humerus
          translation=(0.01406461 0.001775677 0.01990502) orientation=(0.1745504 -0.8726647 0.6108652)
      SpatialTransform: axes_held_at_zero=(translation1 translation2 translation3)
        TransformAxis rotation1: coordinates=elv_angle axis=(0.00043 0.0004740001 0.9990892)
            LinearFunction(coefficients=1 0)
        TransformAxis rotation2: coordinates=extension_angle axis=(-0.00048 0.9990892 -0.0004240001)
            LinearFunction(coefficients=1 0)
        TransformAxis rotation3: coordinates=rotation_angle axis=(0.9990892 -0.0004240001 -0.00048)
            LinearFunction(coefficients=1 0)
    PinJoint humerus_ulna: socket_parent_frame=humerus_offset socket_child_frame=ulna_offset
      Coordinate elbow_flex: default_value=0.944802 range=(-1 1.25) clamped=true
      PhysicalOffsetFrame humerus_offset: socket_parent=/bodyset/humerus
          translation=(0.004978895 9.375445e-5 0.01442709) orientation=(1.570796 0 0)
      PhysicalOffsetFrame ulna_offset: socket_parent=/bodyset/ulna translation=(0.004750182 -0.0004453296 0.01276612)
          orientation=(1.047198 0 0.6108653)
    CustomJoint wrist: socket_parent_frame=radius_offset socket_child_frame=hand_offset
      Coordinate wrist_angle: default_value=-0.226823 range=(-0.226823 -0.226823) clamped=true
      PhysicalOffsetFrame radius_offset: socket_parent=/bodyset/radius translation=(-0.00578821 0.001729196 0.01690448)
          orientation=(-0.3490659 0 0)
      PhysicalOffsetFrame hand_offset: socket_parent=/bodyset/hand translation=(-0.0057878 0.001729363 0.01690471)
          orientation=(-0.8726646 0 0.3490658)
      SpatialTransform: axes_held_at_zero=(rotation2 rotation3 translation1 translation2 translation3)
        TransformAxis rotation1: coordinates=wrist_angle axis=(0.0048 0.9990892 0.04240001)
            LinearFunction(coefficients=1 0)
    PinJoint ulna_radius_pj: socket_parent_frame=ulna_offset socket_child_frame=radius_offset
      Coordinate radius_rot: default_value=-0.1627869 range=(-0.16279 -0.16278) clamped=true
      PhysicalOffsetFrame ulna_offset: socket_parent=/bodyset/ulna translation=(0.004448461 -0.0004615438 0.0135384)
          orientation=(-0.5236686 1.919862 0)
      PhysicalOffsetFrame radius_offset: socket_parent=/bodyset/radius
          translation=(0.004453296 0.0001484432 0.01335989) orientation=(-0.5235988 1.919862 0)
    WeldJoint ground_clavicle: socket_parent_frame=/jointset/shoulder/scapula_offset socket_child_frame=clavicle_offset
      PhysicalOffsetFrame ground_offset: socket_parent=/ground translation=(0 0 0) orientation=(3.488741e-5 0 0)
      PhysicalOffsetFrame clavicle_offset: socket_parent=/bodyset/clavicle
          translation=(0.008420028 0.001759037 0.01184369) orientation=(0.174533 -0.1745331 -1.737713e-5)
  ForceSet:
    DeGrooteFregly2016Muscle [values shared by the 21 below unless stated]: max_control=1 ignore_tendon_compliance=true
        ignore_passive_fiber_force=true
    DeGrooteFregly2016Muscle Pectoralis_Clavicle_Head: min_control=0.01 max_isometric_force=0.032647
        optimal_fiber_length=0.007311788 tendon_slack_length=0.0002611353 pennation_angle_at_optimal=0.25 [radians]
        max_contraction_velocity=10
      PathPoint Pec_Insertion: humerus (0.009245128 0.002003491 0.01942313)
      PathPoint Pec_Midpoint_01: clavicle (0.009620403 -0.0002384038 0.01272385)
      PathPoint Pec_Origin_Clav: clavicle (0.01132773 -0.0009577011 0.01317145)
    DeGrooteFregly2016Muscle Biceps_Short_Head: min_control=0.01 max_isometric_force=0.017758
        optimal_fiber_length=0.008146585 tendon_slack_length=0.0008146586 pennation_angle_at_optimal=0.1
        max_contraction_velocity=100 activation_time_constant=0.015 deactivation_time_constant=0.06
      PathPoint Biceps_Short_Head_Insertion: ulna (0.003060633 0.0001448229 0.0131038)
      PathPoint P2: humerus (0.00898208 0.001650243 0.01894899)
      PathPoint P3: humerus (0.01406056 0.002858128 0.02099423)
      PathPoint Origin: humerus (0.0150163 0.002392997 0.02014089)
      PathWrap shoulder_wrap_BICs: wrap_object=shoulder_wrap method=hybrid
      PathWrap elbow_wrap_BICs: wrap_object=elbow method=hybrid
    DeGrooteFregly2016Muscle Biceps_Long_Head: min_control=0.01 max_isometric_force=0.093419
        optimal_fiber_length=0.01383938 tendon_slack_length=0.0003256324 pennation_angle_at_optimal=0.1
        max_contraction_velocity=10 activation_time_constant=0.015 deactivation_time_constant=0.5
      PathPoint Insertion: ulna (0.003054829 7.242612e-5 0.01302436)
      PathPoint P2: humerus (0.01077041 0.001832094 0.01991952)
      PathPoint Origin: scapula (0.01398267 0.003767436 0.02010068)
      PathWrap shoulder_wrap: wrap_object=shoulder_wrap method=hybrid
      PathWrap elbow_wrap: wrap_object=elbow method=hybrid
    DeGrooteFregly2016Muscle Deltoid_Medial: min_control=0.01 max_isometric_force=0.068715
        optimal_fiber_length=0.008963444 tendon_slack_length=2.987815e-6 pennation_angle_at_optimal=0.2
      PathPoint Deltoid_A_Insertion: humerus (0.009052117 0.001975008 0.01892716)
      PathPoint Deltoid_A-P2: clavicle (0.008468184 0.001394077 0.01324769)
      PathPoint Deltoid_A_Origin: clavicle (0.0093 0.0005 0.0133)
    DeGrooteFregly2016Muscle Triceps_Lat_Head: min_control=0 max_isometric_force=0.125179
        optimal_fiber_length=0.01167531 tendon_slack_length=1.667902e-5 pennation_angle_at_optimal=0.1685
      PathPoint Triceps_Short_Head_Insertion: ulna (0.006055669 -0.0006643254 0.01239303)
      PathPoint Triceps_Short_Head_Origin: humerus (0.01394692 0.002668742 0.01912935)
    DeGrooteFregly2016Muscle Triceps_Long_Head: min_control=0.01 max_isometric_force=0.612472
        optimal_fiber_length=0.01336601 tendon_slack_length=0.001169525 pennation_angle_at_optimal=0.3
        active_force_width_scale=1
      PathPoint Triceps_Long_Head_Insertion: ulna (0.006227161 -0.0008467346 0.01184208)
      PathPoint P2: humerus (0.01112729 0.001178083 0.01513878)
      PathPoint Triceps_Long_Head_Origin: scapula (0.01606403 0.001932406 0.01905311)
    DeGrooteFregly2016Muscle Brachialis_Proximal_Head: min_control=0.01 max_isometric_force=0.065999
        optimal_fiber_length=0.01138722 tendon_slack_length=0.0001626745 pennation_angle_at_optimal=0.1
      PathPoint MaybeBrachialis_InnerHead-Inserion: ulna (0.003371439 8.70886e-5 0.01304876)
      PathPoint MaybeBrachialis_InnerHead-P2: humerus (0.008229201 0.001152088 0.01612923)
      PathPoint MaybeBrachialis_InnerHead-P3: humerus (0.009545877 0.000329168 0.01728133)
      PathPoint MaybeBrachialis_InnerHead-Origin: humerus (0.01368963 0.0007431618 0.0197839)
      PathWrap elbow_wrap: wrap_object=elbow method=hybrid
    DeGrooteFregly2016Muscle Brachialis_Distal_Head: min_control=0.01 max_isometric_force=0.067127
        optimal_fiber_length=0.01135444 tendon_slack_length=1.622063e-5 pennation_angle_at_optimal=0.1
      PathPoint MaybeBrachialis_OuterrHead-Inserion: radius (0.003117307 8.758149e-5 0.013063)
      PathPoint MaybeBrachialis_OuterrHead-P2: humerus (0.008229198 0.001152088 0.01612923)
      PathPoint MaybeBrachialis_OuterrHead-Origin: humerus (0.01355809 0.002291863 0.0192585)
      PathWrap elbow_wrap: wrap_object=elbow method=hybrid
    DeGrooteFregly2016Muscle Anconeus: min_control=0.01 max_isometric_force=0.023302 optimal_fiber_length=0.004844726
        tendon_slack_length=0.0003229817 pennation_angle_at_optimal=0.1 max_contraction_velocity=10 fiber_damping=0
      PathPoint Anconeus_Origin: humerus (0.008558366 0.0008229199 0.01761048)
      PathPoint Insertion: ulna (0.003562636 -0.0002968864 0.01306301)
      PathWrap elbow_wrap: wrap_object=elbow method=hybrid
    DeGrooteFregly2016Muscle Deltoid_Posterior: min_control=0.01 max_control=0.1 max_isometric_force=0.067707
        optimal_fiber_length=0.005760439 tendon_slack_length=0.000164584 pennation_angle_at_optimal=0.2
        max_contraction_velocity=10
      PathPoint Deltoid_M_Insertion: humerus (0.009672951 0.00245365 0.01874597)
      PathPoint Deltoid_M_Origin: scapula (0.01430718 0.001934169 0.01905689)
      PathWrap shoulder_wrap: wrap_object=shoulder_wrap method=axial
    DeGrooteFregly2016Muscle Anconeus_Short_Head: min_control=0.01 max_isometric_force=0.02
        optimal_fiber_length=0.002452139 tendon_slack_length=1.634759e-6 pennation_angle_at_optimal=0.1
        max_contraction_velocity=100
      PathPoint Short_Anconeus_Insertion: ulna (0.005640842 -0.0008906591 0.01232079)
      PathPoint Short_Anconeus_Origin: humerus (0.005925024 -0.001481256 0.01497714)
    DeGrooteFregly2016Muscle Subscapularis_SuperiorHead: min_control=0.01 max_isometric_force=0.340722
        optimal_fiber_length=0.008229198 tendon_slack_length=0.000164584 pennation_angle_at_optimal=0.2
      PathPoint Subscapularis_SuperiorHead_Insertion: humerus (0.01342772 0.001018173 0.02031938)
      PathPoint Subscapularis_SuperiorHead_Origin: scapula (0.02188967 0.0006583359 0.02123133)
    DeGrooteFregly2016Muscle Infraspinatus: min_control=0.01 max_isometric_force=0.065393
        optimal_fiber_length=0.004937519 tendon_slack_length=0.000164584 pennation_angle_at_optimal=0.2
      PathPoint Infraspinatus_Insertion: humerus (0.01366047 0.002633344 0.01958549)
      PathPoint Infraspinatus_P1: scapula (0.01481256 0.002962512 0.01942091)
      PathPoint Infraspinatus_Origin: scapula (0.0174459 0.002139592 0.01909174)
      PathWrap shoulder_wrap: wrap_object=shoulder_wrap method=hybrid
    DeGrooteFregly2016Muscle PronatorTeres: min_control=0 max_isometric_force=0.02 optimal_fiber_length=0.004544293
        tendon_slack_length=0.0001514764 pennation_angle_at_optimal=0.1
      PathPoint Insertion: radius (0.001299622 0.001759538 0.01491877)
      PathPoint Origin: humerus (0.005874323 -0.001102272 0.01525656)
    DeGrooteFregly2016Muscle FlexorCarpiRadialis: min_control=0 max_isometric_force=0.02
        optimal_fiber_length=0.01047396 tendon_slack_length=0.0001496281 pennation_angle_at_optimal=0.1
      PathPoint Insertion: hand (-0.005960823 0.00234856 0.01742394)
      PathPoint P2: radius (0.000586355 0.002037582 0.01515374)
      PathPoint Origin: humerus (0.005636855 -0.001526534 0.01518912)
    DeGrooteFregly2016Muscle Brachioradialis: min_control=0 max_isometric_force=0.02 optimal_fiber_length=0.01053775
        tendon_slack_length=1.505393e-7 pennation_angle_at_optimal=0.1
      PathPoint Insertion: radius (-0.004346129 0.001879598 0.01727466)
      PathPoint Origin: humerus (0.006632966 0.001066184 0.01491113)
    DeGrooteFregly2016Muscle Triceps_Medial_Head: min_control=0 max_isometric_force=0.160104
        optimal_fiber_length=0.006669427 tendon_slack_length=0.0001667357 pennation_angle_at_optimal=0.2
      PathPoint Triceps_Lateral_Head_Origin: humerus (0.01073197 0.0004112226 0.01807342)
      PathPoint Triceps_Lateral_Head-P2: humerus (0.008027413 -3.454716e-5 0.01569781)
      PathPoint Triceps_Lateral_Head_Insertion: radius (0.005669753 -0.0003468253 0.01246845)
    DeGrooteFregly2016Muscle Latissimus_Dorsi_Rostral: min_control=0 max_isometric_force=0.133455
        optimal_fiber_length=0.01810424 tendon_slack_length=0.0008229199 pennation_angle_at_optimal=0.36
      PathPoint Latissimus_Dorsi-Origin: scapula (0.02617578 -0.001499849 0.01571739)
      PathPoint Latissimus_Dorsi-P2: scapula (0.02123817 0.001691103 0.01764585)
      PathPoint Inserion: humerus (0.009707163 0.002465468 0.01853874)
    DeGrooteFregly2016Muscle Latissimus_Dorsi_Caudal: min_control=0 max_isometric_force=0.133455
        optimal_fiber_length=0.01810424 tendon_slack_length=0.008229198 pennation_angle_at_optimal=0.36
      PathPoint Latissimus_Dorsi_Caudal1-Insertion: humerus (0.009101944 0.002768253 0.01892506)
      PathPoint Latissimus_Dorsi_Caudal1-P2: scapula (0.0211752 0.0008801266 0.01492323)
      PathPoint Origin: scapula (0.02703028 -0.003603222 0.005611938)
    DeGrooteFregly2016Muscle Pectoralis_Major_Anterior: min_control=0 max_isometric_force=0.232944
        optimal_fiber_length=0.01316672 tendon_slack_length=0.0003291679 pennation_angle_at_optimal=0.3
      PathPoint Pectoralis_Major-Origin: scapula (0.02151429 -0.002997427 0.02046961)
      PathPoint Pectoralis_Major-Insertion: humerus (0.008726683 0.002322342 0.01913154)
    DeGrooteFregly2016Muscle Pectoralis_Major_Posterior: min_control=0 max_isometric_force=0.170155
        optimal_fiber_length=0.01152088 tendon_slack_length=0.0008229199 pennation_angle_at_optimal=0.3
      PathPoint Origin: scapula (0.02042623 -0.003461291 0.02392959)
      PathPoint Insertion: humerus (0.009103675 0.00168129 0.01935501)
    CoordinateLimitForce elv_angle_CLF: coordinate=elv_angle upper_limit=157.5634 [degrees]
        lower_limit=-28.6479 [degrees] damping=0 transition=5 [degrees]
    CoordinateLimitForce extension_angle_CLF: coordinate=extension_angle upper_limit=126.051 lower_limit=-83.54086
        damping=0 transition=5
    CoordinateLimitForce rotation_angle_CLF: coordinate=rotation_angle upper_limit=28.6479 lower_limit=-57.2958
        damping=0 transition=5
    CoordinateLimitForce elbow_flex_CLF: coordinate=elbow_flex upper_limit=114.592 lower_limit=-66.94702 damping=0
        transition=5
  MarkerSet:
    Marker handm: hand (-0.007239033 0.003720563 0.01823983) fixed=true
    Marker elbow: humerus (0.005073577 0.001284055 0.01367036)
    Marker shoulderm: scapula (0.01328636 0.003609139 0.01928037)
    Marker wristm: radius (-0.002949485 0.002617956 0.01643111)
