# OpenSim document version 20302
ScaleTool subject01:
  GenericModelMaker:
    model_file: model_toScale.osim
  ModelScaler:
    apply: true
    scaling_order: measurements manualScale
    marker_file: mouse_tracked.trc
    time_range: 0 .0267
    preserve_mass_distribution: false
    output_model_file: scaled_mouse.osim
    output_scale_file: scaled_mouse_params.xml
    MeasurementSet mouseKin:
      Measurement humerus_measure: apply=true
        MarkerPair: markers=(shoulderm elbow)
        BodyScale humerus: axes=(X Y Z)
        BodyScale scapula: axes=(X Y Z)
      Measurement ulna_measure: apply=true
        MarkerPair: markers=(elbow wristm)
        BodyScale radius: axes=(X Y Z)
        BodyScale ulna: axes=(X Y Z)
        BodyScale hand: axes=(X Y Z)
